// COMSOL Multiphysics 5.3.1.275 model "COMSOL_FF_effRefrIndexl_v1_MATLAB.mph"
// Outline of the model tree

Parameters
  owgWidth = 200[nm]
  teethWidth = 214[nm]
  gap = 200[nm]
  claddingLength = 1000[nm]
  teethShift = period/2
  kx = 0
  band = 1
  period = 267[nm]
  teethThickness = period/2
  n_clad = 1.6
  n_core = 3.2837
  f_DBE = 193.1904[THz]
  f_SH = 2*f_DBE
  k_step = 31
  kd_range = 0.1

Geometry
  geom1 "Geometry 1" (2D, length unit m)
    r1: Rectangle
      base = center
      layername = {Layer 1, Layer 2, Layer 3, Layer 4}
      layer = {claddingLength, owgWidth, 2*teethWidth + gap, owgWidth}
      size = {period, 2*claddingLength + 2*owgWidth + 2*teethWidth + gap}
    r2: Rectangle "topTooth"
      pos = {teethShift/2, gap/2 + teethWidth/2}
      base = center
      size = {teethThickness, teethWidth}
    r3: Rectangle "bottomTooth"
      pos = {-teethShift/2, -gap/2 - teethWidth/2}
      base = center
      size = {teethThickness, teethWidth}
    fin: Finalize "Form Union"

Materials
  mat1: Common "Cladding" on domains 1-7
    def "Basic"
      relpermeability = 1
      relpermittivity = n_clad^2
      dynamicviscosity = eta(T[1/K])[Pa*s]
      ratioofspecificheat = 1.4
      electricconductivity = 0[S/m]
      heatcapacity = Cp(T[1/K])[J/(kg*K)]
      density = rho(pA[1/Pa],T[1/K])[kg/m^3]
      thermalconductivity = k(T[1/K])[W/(m*K)]
      soundspeed = cs(T[1/K])[m/s]
      eta: Piecewise | arg = T; pieces = {200.0, 1600.0, -8.38278E-7+8.35717342E-8*T^1-7.69429583E-11*T^2+4.6437266E-14*T^3-1.06585607E-17*T^4}
      Cp: Piecewise | arg = T; pieces = {200.0, 1600.0, 1047.63657-0.372589265*T^1+9.45304214E-4*T^2-6.02409443E-7*T^3+1.2858961E-10*T^4}
      rho: Analytic | expr = pA*0.02897/R_const[K*mol/J]/T; args = {pA, T}; dermethod = manual; argders = {{pA, d(pA*0.02897/R_const/T,pA)}, {T, d(pA*0.02897/R_const/T,T)}}
      k: Piecewise | arg = T; pieces = {200.0, 1600.0, -0.00227583562+1.15480022E-4*T^1-7.90252856E-8*T^2+4.11702505E-11*T^3-7.43864331E-15*T^4}
      cs: Analytic | expr = sqrt(1.4*287*T); args = T; dermethod = manual; argders = {T, d(sqrt(1.4*287*T),T)}
    RefractiveIndex
      n = n_clad
      ki = 0
  mat2: Common "Dielectric" on domains 2, 3, 5, 7
    def "Basic"
      relpermeability = 1
      relpermittivity = n_core^2
      dynamicviscosity = eta(T[1/K])[Pa*s]
      ratioofspecificheat = 1.4
      electricconductivity = 0[S/m]
      heatcapacity = Cp(T[1/K])[J/(kg*K)]
      density = rho(pA[1/Pa],T[1/K])[kg/m^3]
      thermalconductivity = k(T[1/K])[W/(m*K)]
      soundspeed = cs(T[1/K])[m/s]
      eta: Piecewise | arg = T; pieces = {200.0, 1600.0, -8.38278E-7+8.35717342E-8*T^1-7.69429583E-11*T^2+4.6437266E-14*T^3-1.06585607E-17*T^4}
      Cp: Piecewise | arg = T; pieces = {200.0, 1600.0, 1047.63657-0.372589265*T^1+9.45304214E-4*T^2-6.02409443E-7*T^3+1.2858961E-10*T^4}
      rho: Analytic | expr = pA*0.02897/R_const[K*mol/J]/T; args = {pA, T}; dermethod = manual; argders = {{pA, d(pA*0.02897/R_const/T,pA)}, {T, d(pA*0.02897/R_const/T,T)}}
      k: Piecewise | arg = T; pieces = {200.0, 1600.0, -0.00227583562+1.15480022E-4*T^1-7.90252856E-8*T^2+4.11702505E-11*T^3-7.43864331E-15*T^4}
      cs: Analytic | expr = sqrt(1.4*287*T); args = T; dermethod = manual; argders = {T, d(sqrt(1.4*287*T),T)}
    RefractiveIndex
      n = n_core
      ki = 0

Physics
  ewfd: ElectromagneticWavesFrequencyDomain on all domains
    dependent variable E = {Ex, Ey, Ez}
    ShapeProperty.valueType = complex
    components.components = outofplane
    wee1: WaveEquationElectric (default)
    pec1: PerfectElectricConductor (default)
    init1: init "Initial Values 1" (default)
    pc1: PeriodicCondition on boundaries 1, 3, 5, 7, 9, 11, 19-24
      PeriodicType = Floquet
      kFloquet = {kx, 0, 0}
      destinationDomains: boundaries 19-24

Mesh
  mesh1 "Mesh 1" (physics-controlled)
    size: MeshSizeDefault | hauto = 2

Studies
  std1 "Study 1"
    param: Parametric "Parametric Sweep"
      sweeptype = filled
      pname = kx
      plistarr = range((pi - kd_range)/period,((pi + kd_range)/period-((pi - kd_range)/period))/(k_step-1),(pi + kd_range)/period)
    eig: Eigenfrequency | neigs = 3; eigunit = THz; shift = 193.19

Solver configurations
  sol1 "Solution 1" (study std1)
    v1: Variables "Dependent Variables 1"
    e1: Eigenvalue "Eigenvalue Solver 1"
      d1: Direct "Suggested Direct Solver (ewfd)"
  sol2 "Parametric Solutions 1" (study std1)

Datasets
  dset1: Solution | solution = sol1
  dset2: Solution | solution = sol2

Plots
  pg2: PlotGroup1D "1D Plot Group 2" | data = dset2; manualgrid = on; yspacing = 0.0001; axisprecision = 8
    glob1: Global | expr = ewfd.freq; unit = Hz; xdata = expr; xdataexpr = kx*period/pi
  pg1: PlotGroup2D "Electric Field (ewfd)" | data = dset2
    surf1: Surface | expr = ewfd.normE
    surf2: Surface | expr = ewfd.normE
      hght1: Height "Height Expression 1" | expr = ewfd.normE
  pg3: PlotGroup2D "Electric Field (ewfd) 1" | data = dset1
    surf1: Surface | expr = ewfd.normE
  pg4: PlotGroup1D "1D Plot Group 4"
    data = dset2
    xlabel = Frequency (Hz)
    ylabel = n_eff = kx/k0
    switchxy = on
    manualgrid = on
    yspacing = 0.0001
    axisprecision = 8
    glob1: Global | expr = ewfd.freq; unit = Hz; xdata = expr; xdataexpr = kx/(ewfd.omega/c_const)